// COMSOL Multiphysics 6.2.0.339 model "Q1-1-Unlocked.mph"
// Outline of the model tree

Parameters
  er_dielectric = 2.56
  d = 0.9375[cm]
  theta_in = 0[deg]
  w = 5[cm]

Geometry
  geom1 "Geometry 1" (2D, length unit m)
    sq1: Square "Air 1" | pos = {-w/2, -w}; size = w
    r1: Rectangle "Dielectric" | pos = {-w/2, 0}; size = {w, d}
    sq2: Square "Air 2" | pos = {-w/2, d}; size = w
    fin: Finalize "Form Union"

Materials
  mat1: Common "Air 1" on domains 1
    def "Basic"
      relpermittivity = 1
      relpermeability = 1
      electricconductivity = 0
  mat2: Common "Dielectric" on domains 2
    def "Basic"
      relpermittivity = er_dielectric
      relpermeability = 1
      electricconductivity = 0
  mat3: Common "Air 2" on domains 3
    def "Basic"
      relpermittivity = 1
      relpermeability = 1
      electricconductivity = 0

Physics
  emw: ElectromagneticWaves "Electromagnetic Waves, Frequency Domain" on all domains
    dependent variable E = {Ex, Ey, Ez}
    wee1: WaveEquationElectric (default)
    pec1: PerfectElectricConductor (default)
    init1: init "Initial Values 1" (default)
    port1: Port on boundaries 2 | PortType = Periodic; Eampl = {0, 0, 1}; alpha_inc = theta_in
    pc1: PeriodicCondition on boundaries 1, 3, 5, 8-10 | destinationDomains: boundaries 8-10
    port2: Port on boundaries 7 | PortType = Periodic; Eampl = {0, 0, 1}

Mesh
  mesh1 "Mesh 1"
    id1: IdenticalMesh | group1 = boundaries 1, 3, 5; group2 = boundaries 8-10
    ftri1: FreeTri "Free Triangular 1" on remaining entities | smoothmaxiter = 4; smoothmaxdepth = 4

Studies
  std1 "Study 1"
    freq: Frequency "Frequency Domain" | punit = GHz; plist = range(5,0.5,15)[GHz]

Solver configurations
  sol1 "Solution 1" (study std1)
    v1: Variables "Dependent Variables 1"
    s1: Stationary "Stationary Solver 1" | stol = 0.01; linpmethod = sol
      p1: Parametric | pname = freq; plistarr = range(5,0.5,15)[GHz]; punit = GHz; pcontinuationmode = no
      fc1: FullyCoupled | linsolver = d1
      d1: Direct "Suggested Direct Solver (emw)" | linsolver = pardiso

Datasets
  dset1: Solution | solution = sol1

Derived values
  gev1: EvalGlobal "S-parameter (emw)" | data = dset1; table = tbl1; expr = {emw.S11dB, emw.S21dB}

Tables
  tbl1: Table
    freq (GHz) | S11 (1) | S21 (1)
    1 | -16.5326 | -0.0975875

Plots
  pg1: PlotGroup2D "Electric Field (emw)" | data = dset1
    surf1: Surface | expr = emw.normE
  pg2: PlotGroup1D "Polarization Plot (emw)" | data = dset1; title = Polarization states, Color: Phase (Radians)
    plz1: Polarization | legends = Reflection
      col1: Color "Color Expression 1" | expr = phase
    plz2: Polarization | legends = Transmission
      col1: Color "Color Expression 1" | expr = phase
  pg3: PlotGroup1D "1D Plot Group 3" | data = dset1
    glob1: Global | expr = abs(emw.S11)