// COMSOL Multiphysics 6.2.0.339 model "Q1-3-Unlocked.mph"
// Outline of the model tree

Parameters
  theta_in = 0[deg]
  n1 = 1.12
  n2 = 1.4
  n3 = 1.85
  n4 = 2
  w = 10[cm]
  d1 = 0.55[cm]
  d2 = 0.52[cm]
  d3 = 0.55[cm]

Geometry
  geom1 "Geometry 1" (2D, length unit m)
    sq1: Square | pos = {-w/2, -w}; size = w
    r1: Rectangle | pos = {-w/2, 0}; size = {w, d1}
    r2: Rectangle | pos = {-w/2, d1}; size = {w, d2}
    r3: Rectangle | pos = {-w/2, d1+d2}; size = {w, d3}
    sq2: Square | pos = {-w/2, d1+d2+d3}; size = w
    fin: Finalize "Form Union"

Materials
  mat1: Common "Material 1" on domains 1
    def "Basic"
      relpermittivity = 1
      relpermeability = 1
      electricconductivity = 0
  mat2: Common "Material 2" on domains 2
    def "Basic"
      relpermittivity = n1^2
      relpermeability = 1
      electricconductivity = 0
  mat3: Common "Material 3" on domains 3
    def "Basic"
      relpermittivity = n2^2
      relpermeability = 1
      electricconductivity = 0
  mat4: Common "Material 4" on domains 4
    def "Basic"
      relpermittivity = n3^2
      relpermeability = 1
      electricconductivity = 0
  mat5: Common "Material 5" on domains 5
    def "Basic"
      relpermittivity = n4^2
      relpermeability = 1
      electricconductivity = 0

Physics
  emw: ElectromagneticWaves "Electromagnetic Waves, Frequency Domain" on all domains
    dependent variable E = {Ex, Ey, Ez}
    wee1: WaveEquationElectric (default)
    pec1: PerfectElectricConductor (default)
    init1: init "Initial Values 1" (default)
    port1: Port on boundaries 2 | PortType = Periodic; Eampl = {0, 0, 1}; alpha_inc = theta_in
    port2: Port on boundaries 11 | PortType = Periodic; Eampl = {0, 0, 1}
    pc1: PeriodicCondition on boundaries 1, 3, 5, 7, 9, 12-16 | destinationDomains: boundaries 12-16

Mesh
  mesh1 "Mesh 1" (physics-controlled)

Studies
  std1 "Study 1"
    freq: Frequency "Frequency Domain" | punit = GHz; plist = range(0.1,0.5,20)[GHz]

Solver configurations
  sol1 "Solution 1" (study std1)
    v1: Variables "Dependent Variables 1"
    s1: Stationary "Stationary Solver 1" | stol = 0.01; linpmethod = sol
      p1: Parametric | pname = freq; plistarr = range(0.1,0.5,20)[GHz]; punit = GHz; pcontinuationmode = no
      fc1: FullyCoupled | linsolver = d1
      d1: Direct "Suggested Direct Solver (emw)" | linsolver = pardiso

Datasets
  dset1: Solution | solution = sol1

Derived values
  gev1: EvalGlobal "S-parameter (emw)" | data = dset1; table = tbl1; expr = {emw.S11dB, emw.S21dB}

Tables
  tbl1: Table
    freq (GHz) | S11 (1) | S21 (1)
    1 | 1.73579e-14 | -inf

Plots
  pg1: PlotGroup2D "Electric Field (emw)" | data = dset1
    surf1: Surface | expr = emw.normE
  pg2: PlotGroup1D "Polarization Plot (emw)" | data = dset1; title = Polarization states, Color: Phase (Radians)
    plz1: Polarization | legends = Reflection
      col1: Color "Color Expression 1" | expr = phase
  pg3: PlotGroup1D "1D Plot Group 3" | data = dset1; xlabel = freq (GHz); ylabel = Reflection
    glob1: Global | expr = abs(emw.S11)