// COMSOL Multiphysics 6.2.0.339 model "Q2-Unlocked.mph"
// Outline of the model tree

Parameters
  theta_in = 0[deg]
  sigma = 330
  f = 3[GHz]
  w = 5[cm]
  d = 2.5[cm]
  d_graphite = 10[mm]
  er_graphite = 10

Geometry
  geom1 "Geometry 1" (2D, length unit m)
    r1: Rectangle | size = {w, w}
    r2: Rectangle | pos = {0, w}; size = {w, d_graphite}
    r3: Rectangle | pos = {0, w + d_graphite}; size = {w, d}
    fin: Finalize "Form Union"

Materials
  mat1: Common "Material 1" on domains 1
    def "Basic"
      relpermittivity = 1
      relpermeability = 1
      electricconductivity = 0
  mat2: Common "Material 2" on domains 2
    def "Basic"
      relpermittivity = er_graphite
      relpermeability = 1
      electricconductivity = sigma
  mat3: Common "Material 3" on domains 3
    def "Basic"
      relpermittivity = 1
      relpermeability = 1
      electricconductivity = 0

Physics
  emw: ElectromagneticWaves "Electromagnetic Waves, Frequency Domain" on all domains
    dependent variable E = {Ex, Ey, Ez}
    wee1: WaveEquationElectric (default)
    pec1: PerfectElectricConductor (default)
    init1: init "Initial Values 1" (default)
    pec2: PerfectElectricConductor on boundaries 7
    port1: Port on boundaries 2 | PortType = Periodic; Eampl = {0, 0, 1}; alpha_inc = theta_in
    pc1: PeriodicCondition on boundaries 1, 3, 5, 8-10 | destinationDomains: boundaries 8-10

Mesh
  mesh1 "Mesh 1"
    id1: IdenticalMesh | group1 = boundaries 1, 3, 5; group2 = boundaries 8-10
    ftri1: FreeTri "Free Triangular 1" on remaining entities | smoothmaxiter = 4; smoothmaxdepth = 4

Studies
  std1 "Study 1"
    param: Parametric "Parametric Sweep" | pname = d_graphite; plistarr = range(0.005,0.001,0.011)[mm]; punit = m
    freq: Frequency "Frequency Domain" | punit = GHz; plist = f

Solver configurations
  sol1 "Solution 1" (study std1)
    v1: Variables "Dependent Variables 1"
    s1: Stationary "Stationary Solver 1" | stol = 0.01; linpmethod = sol
      p1: Parametric | pname = freq; plistarr = f; punit = GHz; pcontinuationmode = no
      fc1: FullyCoupled | linsolver = d1
      d1: Direct "Suggested Direct Solver (emw)" | linsolver = pardiso
  sol2 "Parametric Solutions 1" (study std1)

Datasets
  dset1: Solution | solution = sol1
  dset2: Solution | solution = sol2

Derived values
  gev1: EvalGlobal "S-parameter (emw)" | data = dset1; table = tbl1; expr = emw.S11dB

Tables
  tbl1: Table
    freq (GHz) | S11 (1)
    3 | -0.229499

Plots
  pg1: PlotGroup2D "Electric Field (emw)" | data = dset1
    surf1: Surface | expr = emw.normE
  pg2: PlotGroup1D "Polarization Plot (emw)" | data = dset1; title = Polarization states, Color: Phase (Radians)
    plz1: Polarization | legends = Reflection
      col1: Color "Color Expression 1" | expr = phase
  pg3: PlotGroup2D "Electric Field (emw) 1" | data = dset2
    surf1: Surface | expr = emw.normE
  pg4: PlotGroup1D "S-parameter (emw)" | data = dset2; ylabel = S-parameter (dB)
    glob1: Global | expr = emw.S11dB; unit = 1; descr = S11; xdata = expr; xdataexpr = d_g
  pg5: SmithGroup "Smith Plot (emw)" | data = dset2
    rgr1: ReflectionGraph
      expr = emw.S11
      unit = 1
      descr = S11
      title = Reflection Graph: S-parameter, Color: Frequency (GHz)
      col1: Color "Color Expression 1" | expr = emw.freq/1e9
  pg6: PlotGroup1D "Polarization Plot (emw) 1" | data = dset2; title = Polarization states, Color: Phase (Radians)
    plz1: Polarization | legends = Reflection
      col1: Color "Color Expression 1" | expr = phase
  pg7: PlotGroup1D "1D Plot Group 7" | data = dset2
    glob1: Global | data = dset2; expr = abs(abs(emw.S11)); xdata = expr; xdataexpr = d_graphite